# OpenSim document version 40000
Model Can:
  gravity: 0 0 -9.80665
  Ground
  BodySet:
    Body cylinder: mass=0.5077 [kg] mass_center=(0 0 0) inertia=(0.0006764256 0.0006764256 0.0003475206 0 0 0)
      PhysicalOffsetFrame CylinderCenter: socket_parent=.. translation=(0 0 0) [meters]
        Cylinder CylinderCenter_geom_1: radius=0.037 half_height=0.0545
  JointSet:
    FreeJoint CoMjoint: socket_parent_frame=ground_offset socket_child_frame=cylinder_offset
      Coordinate CoMjoint_coord_0
      Coordinate CoMjoint_coord_1
      Coordinate CoMjoint_coord_2
      Coordinate CoMjoint_coord_3
      Coordinate CoMjoint_coord_4
      Coordinate CoMjoint_coord_5
      PhysicalOffsetFrame ground_offset: socket_parent=/ground translation=(0 0 0)
      PhysicalOffsetFrame cylinder_offset: socket_parent=/bodyset/cylinder translation=(0 0 0)
  MarkerSet:
    Marker CoM: cylinder (0 0 0)
    Marker Tip: cylinder (0 0 0.0545)
    Marker Hull: cylinder (0 0.037 0)
